<?xml version="1.0"?>
<!--
  22x10 electric prop (APC 22x10E class), 2 blades, ~110 g.
  ixx = (1/12) * 0.110 kg * (22 * 0.0254 m)^2.

  C_THRUST / C_POWER vs. advance ratio J: the shape of JSBSim's bundled
  DJI_9450 (APC 9x4.5-derived) tables, with J scaled by the pitch/diameter
  ratio (0.455 vs 0.479) and the coefficients scaled to a static CT of 0.085
  and CP of 0.040. Negative values past zero thrust model windmilling.
-->
<propeller name="Prop 22x10E" version="1.1">
  <ixx unit="KG*M2"> 0.00286 </ixx>
  <diameter unit="IN"> 22 </diameter>
  <numblades> 2 </numblades>
  <constspeed> 0 </constspeed>

  <table name="C_THRUST" type="internal">
    <tableData>
      0.000   0.0850
      0.050   0.0826
      0.100   0.0797
      0.150   0.0762
      0.200   0.0720
      0.250   0.0674
      0.300   0.0621
      0.350   0.0560
      0.400   0.0492
      0.450   0.0415
      0.500   0.0336
      0.550   0.0252
      0.600   0.0164
      0.650   0.0075
      0.693   0.0000
      0.800  -0.0180
      1.000  -0.0500
    </tableData>
  </table>

  <table name="C_POWER" type="internal">
    <tableData>
      0.000   0.0400
      0.050   0.0385
      0.100   0.0369
      0.150   0.0353
      0.200   0.0336
      0.250   0.0318
      0.300   0.0299
      0.350   0.0276
      0.400   0.0250
      0.450   0.0222
      0.500   0.0192
      0.550   0.0157
      0.600   0.0120
      0.650   0.0079
      0.693   0.0037
      0.800  -0.0040
      1.000  -0.0150
    </tableData>
  </table>
</propeller>
